<neuroml xmlns="http://www.neuroml.org/schema/neuroml2"  xmlns:xs="http://www.w3.org/2001/XMLSchema" xmlns:xsi="http://www.w3.org/2001/XMLSchema-instance" xsi:schemaLocation="http://www.neuroml.org/schema/neuroml2 https://raw.github.com/NeuroML/NeuroML2/development/Schemas/NeuroML2/NeuroML_v2beta4.xsd" id="PyNN_NeuroML2_Export">
    <IF_curr_alpha id="IF_curr_alpha_E_net" cm="1.000000e-03" i_offset="0.000000e+00" tau_syn_E="1.000000e-01" tau_syn_I="1.000000e-01" v_init="-6.500000e+01" tau_m="2.000000e+01" tau_refrac="2.000000e+00" v_reset="0.000000e+00" v_rest="0.000000e+00" v_thresh="2.000000e+01"/>
    <IF_curr_alpha id="IF_curr_alpha_I_net" cm="1.000000e-03" i_offset="0.000000e+00" tau_syn_E="1.000000e-01" tau_syn_I="1.000000e-01" v_init="-6.500000e+01" tau_m="2.000000e+01" tau_refrac="2.000000e+00" v_reset="0.000000e+00" v_rest="0.000000e+00" v_thresh="2.000000e+01"/>
    <alphaCurrSynapse id="syn__E_net__TO__E_net" tau_syn="1.000000e-01"/>
    <alphaCurrSynapse id="syn__I_net__TO__E_net" tau_syn="1.000000e-01"/>
    <alphaCurrSynapse id="syn__expoisson__TO__E_net" tau_syn="1.000000e-01"/>
    <alphaCurrSynapse id="syn__E_net__TO__I_net" tau_syn="1.000000e-01"/>
    <alphaCurrSynapse id="syn__I_net__TO__I_net" tau_syn="1.000000e-01"/>
    <alphaCurrSynapse id="syn__inpoisson__TO__I_net" tau_syn="1.000000e-01"/>
    <SpikeSourcePoisson id="SpikeSourcePoisson_expoisson" start="0.0ms" duration="10000000000.0ms" rate="20000.0Hz"/>
    <SpikeSourcePoisson id="SpikeSourcePoisson_inpoisson" start="0.0ms" duration="10000000000.0ms" rate="20000.0Hz"/>
    <network id="network">
        <population id="E_net" component="IF_curr_alpha_E_net" size="40" type="populationList">
            <instance id="0">
                <location x="0." y="0." z="0."/>
            </instance>
            <instance id="1">
                <location x="1." y="0." z="0."/>
            </instance>
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        </population>
        <population id="I_net" component="IF_curr_alpha_I_net" size="10" type="populationList">
            <instance id="0">
                <location x="0." y="0." z="0."/>
            </instance>
            <instance id="1">
                <location x="1." y="0." z="0."/>
            </instance>
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        </population>
        <population id="expoisson" component="SpikeSourcePoisson_expoisson" size="40" type="populationList">
            <instance id="0">
                <location x="0." y="0." z="0."/>
            </instance>
            <instance id="1">
                <location x="1." y="0." z="0."/>
            </instance>
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        </population>
        <population id="inpoisson" component="SpikeSourcePoisson_inpoisson" size="10" type="populationList">
            <instance id="0">
                <location x="0." y="0." z="0."/>
            </instance>
            <instance id="1">
                <location x="1." y="0." z="0."/>
            </instance>
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        </population>
        <projection id="E_net__TO__E_net" presynapticPopulation="E_net" postsynapticPopulation="E_net" synapse="syn__E_net__TO__E_net">
            <connectionWD id="0" preCellId="../E_net/5/IF_curr_alpha_E_net" preSegmentId="0" preFractionAlong="0.5" postCellId="../E_net/0/IF_curr_alpha_E_net" postSegmentId="0" postFractionAlong="0.5" weight="0.000413635066326" delay="1.5ms"/>
            <connectionWD id="1" preCellId="../E_net/6/IF_curr_alpha_E_net" preSegmentId="0" preFractionAlong="0.5" postCellId="../E_net/0/IF_curr_alpha_E_net" postSegmentId="0" postFractionAlong="0.5" weight="0.000413635066326" delay="1.5ms"/>
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        </projection>
        <projection id="I_net__TO__E_net" presynapticPopulation="I_net" postsynapticPopulation="E_net" synapse="syn__I_net__TO__E_net">
            <connectionWD id="0" preCellId="../I_net/1/IF_curr_alpha_I_net" preSegmentId="0" preFractionAlong="0.5" postCellId="../E_net/1/IF_curr_alpha_E_net" postSegmentId="0" postFractionAlong="0.5" weight="-0.002068175331632" delay="1.5ms"/>
            <connectionWD id="1" preCellId="../I_net/0/IF_curr_alpha_I_net" preSegmentId="0" preFractionAlong="0.5" postCellId="../E_net/2/IF_curr_alpha_E_net" postSegmentId="0" postFractionAlong="0.5" weight="-0.002068175331632" delay="1.5ms"/>
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        </projection>
        <projection id="expoisson__TO__E_net" presynapticPopulation="expoisson" postsynapticPopulation="E_net" synapse="syn__expoisson__TO__E_net">
            <connectionWD id="0" preCellId="../expoisson/0/SpikeSourcePoisson_expoisson" preSegmentId="0" preFractionAlong="0.5" postCellId="../E_net/0/IF_curr_alpha_E_net" postSegmentId="0" postFractionAlong="0.5" weight="0.000413635066326" delay="0.1ms"/>
            <connectionWD id="1" preCellId="../expoisson/1/SpikeSourcePoisson_expoisson" preSegmentId="0" preFractionAlong="0.5" postCellId="../E_net/1/IF_curr_alpha_E_net" postSegmentId="0" postFractionAlong="0.5" weight="0.000413635066326" delay="0.1ms"/>
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        </projection>
        <projection id="E_net__TO__I_net" presynapticPopulation="E_net" postsynapticPopulation="I_net" synapse="syn__E_net__TO__I_net">
            <connectionWD id="0" preCellId="../E_net/2/IF_curr_alpha_E_net" preSegmentId="0" preFractionAlong="0.5" postCellId="../I_net/0/IF_curr_alpha_I_net" postSegmentId="0" postFractionAlong="0.5" weight="0.000413635066326" delay="1.5ms"/>
            <connectionWD id="1" preCellId="../E_net/6/IF_curr_alpha_E_net" preSegmentId="0" preFractionAlong="0.5" postCellId="../I_net/0/IF_curr_alpha_I_net" postSegmentId="0" postFractionAlong="0.5" weight="0.000413635066326" delay="1.5ms"/>
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        </projection>
        <projection id="I_net__TO__I_net" presynapticPopulation="I_net" postsynapticPopulation="I_net" synapse="syn__I_net__TO__I_net">
            <connectionWD id="0" preCellId="../I_net/4/IF_curr_alpha_I_net" preSegmentId="0" preFractionAlong="0.5" postCellId="../I_net/0/IF_curr_alpha_I_net" postSegmentId="0" postFractionAlong="0.5" weight="-0.002068175331632" delay="1.5ms"/>
            <connectionWD id="1" preCellId="../I_net/6/IF_curr_alpha_I_net" preSegmentId="0" preFractionAlong="0.5" postCellId="../I_net/1/IF_curr_alpha_I_net" postSegmentId="0" postFractionAlong="0.5" weight="-0.002068175331632" delay="1.5ms"/>
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        </projection>
        <projection id="inpoisson__TO__I_net" presynapticPopulation="inpoisson" postsynapticPopulation="I_net" synapse="syn__inpoisson__TO__I_net">
            <connectionWD id="0" preCellId="../inpoisson/0/SpikeSourcePoisson_inpoisson" preSegmentId="0" preFractionAlong="0.5" postCellId="../I_net/0/IF_curr_alpha_I_net" postSegmentId="0" postFractionAlong="0.5" weight="0.000413635066326" delay="0.1ms"/>
            <connectionWD id="1" preCellId="../inpoisson/1/SpikeSourcePoisson_inpoisson" preSegmentId="0" preFractionAlong="0.5" postCellId="../I_net/1/IF_curr_alpha_I_net" postSegmentId="0" postFractionAlong="0.5" weight="0.000413635066326" delay="0.1ms"/>
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        </projection>
    </network>
</neuroml>
