<?xml version="1.0"?>
<Lems>
  <Target component="sim1"/>

  <Include file="Synapses.xml"/>
  <Include file="Cells.xml"/>
  <Include file="Networks.xml"/>
  <Include file="Simulation.xml"/>
  <Include file="Inputs.xml"/>

  <Include file="single_cell_spikegen.nml"/>

  <Simulation id="sim1" length="1000ms" step="0.005ms" target="net">
    <!--  	-->
    <Display id="display_0" timeScale="1ms" title="IafRef cell: Vm" xmin="0" xmax="1000" ymin="-1" ymax="1">
      <Line color="#000000" id="iaf_v" quantity="iafPop[0]/v" scale="1mV" timeScale="1ms"/>
    </Display>
    <Display id="display_1" timeScale="1ms" title="Spike array: tsince" xmin="0" xmax="1000" ymin="0" ymax="50">
      <Line color="#0000FF" id="spikes_t" quantity="spksPop[0]/tsince" scale="1ms" timeScale="1ms"/>
    </Display>

    <OutputFile id="of0" fileName="/tmp/nml_v.dat">
      <OutputColumn id="iaf_v" quantity="iafPop[0]/v"/>
    </OutputFile>
  </Simulation>

</Lems>
