<neuroml xmlns="http://www.neuroml.org/schema/neuroml2"  xmlns:xs="http://www.w3.org/2001/XMLSchema" xmlns:xsi="http://www.w3.org/2001/XMLSchema-instance" xsi:schemaLocation="http://www.neuroml.org/schema/neuroml2 https://raw.github.com/NeuroML/NeuroML2/development/Schemas/NeuroML2/NeuroML_v2beta4.xsd" id="Brunel">
    <alphaCurrentSynapse id="alpha_syn_ex" tau="0.5ms" ibase="20.6801552437nA"/>
    <alphaCurrentSynapse id="alpha_syn_in" tau="0.5ms" ibase="-103.400776218nA"/>
    <iafRefCell id="iaf" leakReversal="0 mV" thresh="20 mV" reset="0 mV" C="250.0pF" leakConductance="12.5nS" refract="2 ms"/>
    <spikeArray id="spks">
        <spike id="0" time="100 ms"/>
        <spike id="1" time="120 ms"/>
        <spike id="2" time="126 ms"/>
        <spike id="3" time="135 ms"/>
    </spikeArray>
    <network id="net">
        <population id="nodes_ex" component="iaf" size="40"/>
        <population id="nodes_inh" component="iaf" size="10"/>
        <population id="noise" component="spks" size="1"/>
        <projection id="Proj0" presynapticPopulation="noise" postsynapticPopulation="nodes_ex" synapse="alpha_syn_ex">
            <connectionWD id="0" preCellId="noise[0]" preSegmentId="0" preFractionAlong="0.5" postCellId="nodes_ex[0]" postSegmentId="0" postFractionAlong="0.5" weight="1." delay="1.5 ms"/>
            <connectionWD id="1" preCellId="noise[0]" preSegmentId="0" preFractionAlong="0.5" postCellId="nodes_ex[1]" postSegmentId="0" postFractionAlong="0.5" weight="1." delay="1.5 ms"/>
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        </projection>
    </network>
</neuroml>
